solve block
    y''(x) + 0.1*y'(x) + y(x) == 0
    y(0) == 0.1
    y'(0) == 0
    y := Odesolve(y(x), 50)
end solve block
x := 0, 1 .. 50
# [plot: y(x), integral(y(x), x = 0 .. x), d/dx(y(x)) vs x]
# [plot: y(x) vs d/dx(y(x))]
