x := 0, 0.1 .. 2
solve block
    d/dx(y(x)) == 2*x + 1
    y(0) == 3
    y := Odesolve(y(x), 50)
end solve block
# [plot: y(x), d/dx(y(x)), integral(y(x), x = 0 .. x) vs x]
x := 0, 1 .. 10
solve block
    d/dx(y(x)) == y(x) - y(x)^2
    y(0) == 0.1
    y := Odesolve(y(x), 50)
end solve block
# [plot: y(x), d/dx(y(x)), integral(y(x), x = 0 .. x) vs x]
