solve block
    y_1''(t) - 1*(1 - y_1(t)^2)*y_1'(t) + y_1(t) == 0
    y_1(0) == 0.01
    y_1'(0) == 0
    y_1 := Odesolve(y_1''(t), 30)
end solve block
solve block
    y_2''(t) - 2*(1 - y_2(t)^2)*y_2'(t) + y_2(t) == 0
    y_2(0) == 0.01
    y_2'(0) == 0
    y_2 := Odesolve(y_2''(t), 30)
end solve block
solve block
    y_3''(t) - 3*(1 - y_3(t)^2)*y_3'(t) + y_3(t) == 0
    y_3(0) == 0.01
    y_3'(0) == 0
    y_3 := Odesolve(y_3''(t), 30)
end solve block
t := 0, 0.1 .. 30
# [plot: y_1(t), y_2(t), y_3(t) vs t]
# [plot: y_1(t), y_2(t), y_3(t) vs d/dt(y_1(t)), d/dt(y_2(t)), d/dt(y_3(t))]
