solve block
    d/dt(x(t)) == -1.2*y(t)
    x(0) == 0
    d/dt(y(t)) == 1.4*x(t) - 0.1*y(t)
    y(0) == 2
    [x; y] := Odesolve([x(t); y(t)], 20)
end solve block
t := 0, 0.5 .. 20
# [plot: x(t)/y(t) vs t]
# [plot: y(t) vs x(t)]
