α := 0.079
β := 0.039
γ := 0.099
E_0 := 290
solve block
    W(0) == 600
    S(0) == 520
    d/dt(W(t)) == α*W(t) - β*S(t)
    d/dt(S(t)) == γ*(W(t) - S(t) - E_0)
    [W; S] := Odesolve([W(t); S(t)], 10)
end solve block
# [plot: W(t), S(t) vs t]
# [plot: S(t) vs W(t)]
W_1 := (β*E_0)/(β - α)
S_1 := (α*E_0)/(β - α)
W_1 =  # no stored result
S_1 =  # no stored result
λ_1 := ((α - γ) + sqrt((α - γ)^2 - 4*γ*(β - α)))/2
λ_2 := ((α - γ) - sqrt((α - γ)^2 - 4*γ*(β - α)))/2
λ_1 =  # no stored result
λ_2 =  # no stored result
# Оскільки λ1​>0, а λ2​<0, точка спокою типу Сідло. Система є нестійкою.
