X := 5
α := 0.1
γ := 0.2
a_h := 0.7
a_s := -0.7
Y := 4
β := 0.25
δ := 0.3
b_h := 0.5
b_s := -0.5
t := 0, 0.1 .. 10
solve block
    d/dt(x_1(t)) == α*y_1(t)
    d/dt(y_1(t)) == β*x_1(t)
    x_1(0) == X
    y_1(0) == Y
    [x_1; y_1] := Odesolve([x_1(t); y_1(t)], 10)
end solve block
# [plot: x_1(t), y_1(t) vs t]
solve block
    d/dt(x_2(t)) == α*y_2(t)*(-γ)*x_2(t)
    d/dt(y_2(t)) == β*x_2(t) - δ*y_2(t)
    x_2(0) == X
    y_2(0) == Y
    [x_2; y_2] := Odesolve([x_2(t); y_2(t)], 10)
end solve block
# [plot: x_2(t), y_2(t) vs t]
solve block
    d/dt(x_3(t)) == -γ*x_3(t) + α*y_3(t) + a_h
    d/dt(y_3(t)) == β*x_3(t) - δ*y_3(t) + b_h
    x_3(0) == X
    y_3(0) == Y
    [x_3; y_3] := Odesolve([x_3(t); y_3(t)], 10)
end solve block
# [plot: x_3(t), y_3(t) vs t]
solve block
    d/dt(x_3(t)) == -γ*x_3(t) + α*y_3(t) + a_s
    d/dt(y_3(t)) == β*x_3(t) - δ*y_3(t) + b_s
    x_3(0) == X
    y_3(0) == Y
    [x_3; y_3] := Odesolve([x_3(t); y_3(t)], 10)
end solve block
# [plot: x_3(t), y_3(t) vs t]
