x := [1; 2; 3; 4; 5; 6; 7; 8; 9; 10; 11; 12; 13; 14; 15]
y := [3.4; 5.2; 4.7; 6.1; 7.8; 6.2; 7.5; 8.2; 9.1; 11; 9.9; 9.7; 11.2; 11.3; 12]
t := 1, 1.1 .. 15
Yl(t) := linterp(x, y, t)
u := [1; 2; 3; 4; 5; 6; 7; 8; 9; 10; 11; 12; 13; 15]
s_1 := lspline(x, y)
Y_s1(t) := interp(s_1, x, y, t)
s_2 := pspline(x, y)
Y_s2(t) := interp(s_2, x, y, t)
s_3 := cspline(x, y)
b := bspline(x, y, u, 2)
Y_s3(t) := interp(s_3, x, y, t)
Y_b(t) := interp(b, x, y, t)
# [plot: y, Yl(t), Y_s1(t), Y_s2(t), Y_s3(t), Y_b(t) vs x, t]
# [plot: Y_s1(t), Y_s2(t), Y_s3(t) vs t]
