x := [1; 2; 3; 4; 5; 6; 7; 8; 9; 10; 11; 12; 13; 14; 15]
y := [3.8; 4.9; 4.5; 5.8; 7.1; 6.8; 8.1; 7.9; 9.5; 10.4; 10.1; 10.8; 12; 11.7; 12.6]
t := 1, 1.1 .. 15
c := line(x, y)
Y_mnk(t) := c[0] + c[1]*t
m := medfit(x, y)
Y_med(t) := m[0] + m[1]*t
# [plot: y, Y_mnk(t), Y_med(t) vs x, t]
