k := 3
x := [1; 2; 3; 4; 5; 6; 7; 8; 9; 10; 11; 12; 13; 14; 15]
y := [3.4; 5.2; 4.7; 6.1; 7.8; 6.2; 7.5; 8.2; 9.1; 11; 9.9; 9.7; 11.2; 11.3; 12]
t := 1, 1.1 .. 15
s_p := regress(x, y, k)
P(t) := interp(s_p, x, y, t)
span := 0.4
s_l := loess(x, y, span)
L(t) := interp(s_l, x, y, t)
# [plot: y, P(t), L(t) vs x, t]
