x := [1; 2; 3; 4; 5; 6; 7; 8; 9; 10; 11; 12; 13; 14; 15]
y := [3.4; 5.2; 4.7; 6.1; 7.8; 6.2; 7.5; 8.2; 9.1; 11; 9.9; 9.7; 11.2; 11.3; 12]
t := 1, 1.1 .. 15
g := transpose([1, 1, 1])
C_e := expfit(x, y, g)
F_e(t) := C_e[0]*exp(C_e[1]*t) + C_e[2]
C_l := lgsfit(x, y, g)
F_l(t) := C_l[0]/(1 + C_l[1]*exp(-C_l[2]*t))
C_s := sinfit(x, y, g)
F_s(t) := C_s[0]*sin(t + C_s[1]) + C_s[2]
C_p := pwrfit(x, y, g)
F_p(t) := C_p[0]*t^C_p[1] + C_p[2]
C_log := logfit(x, y, g)
F_log(t) := C_log[0]*ln(t + C_log[1]) + C_log[2]
C_ln := lnfit(x, y)
F_ln(t) := C_ln[0]*ln(t) + C_ln[1]
# [plot: y, F_e(t), F_l(t), F_s(t), F_p(t), F_log(t), F_ln(t) vs x, t]
