x := [1; 2; 3; 4; 5; 6; 7; 8; 9; 10; 11; 12; 13; 14; 15]
y := [3.4; 5.2; 4.7; 6.1; 7.8; 6.2; 7.5; 8.2; 9.1; 11; 9.9; 9.7; 11.2; 11.3; 12]
t := 1, 1.1 .. 15
F(z) := [z; exp(0.15*z); 1/(1.2 + z)]
K := linfit(x, y, F)
Y_lin(t) := K[0]*t + K[1]*exp(0.15*t) + K[2]*1/(1.2 + t)
# [plot: y, Y_lin(t) vs x, t]
