x := [1; 2; 3; 4; 5; 6; 7; 8; 9; 10; 11; 12; 13; 14; 15]
y := [3.4; 5.2; 4.7; 6.1; 7.8; 6.2; 7.5; 8.2; 9.1; 11; 9.9; 9.7; 11.2; 11.3; 12]
t := 1, 1.1 .. 15
b := 3
bw := 2
S_med := medsmooth(y, b)
S_k := ksmooth(x, y, bw)
S_sup := supsmooth(x, y)
# [plot: y, S_med, S_k, S_sup vs x]
